// SBML level 3 version 1

model full_pathway()

  // Compartments:
  compartment default_compartment = 1;

  // Species:
  species S1 in default_compartment = 0;
  species S2 in default_compartment = 0;
  species A_E in default_compartment = 3/default_compartment;
  species A_SE in default_compartment = A_E + S1;
  species B_E in default_compartment = 3/default_compartment;
  species B_SE in default_compartment = B_E + S2;

  // Parameters:
  k1 = 0.3;
  k2 = 2.3;
  k3 = 3.5;
  k4 = 0.0004;
  A_k2 = 0.4;
  A_ES = 0;
  k5 = 1;
  B_k2 = 0.4;
  B_ES = 0;

  // Reactions:
  _J0: -> S1; k1;
  _J1: S1 -> S2; k2*S1;
  _J2: S2 -> ; k3*S2;
  A_J0: S1 + A_E -> A_SE; k4*A_k2*S1*A_E - A_k2*A_ES;
  B_J0: S2 + B_E -> B_SE; k5*B_k2*S2*B_E - B_k2*B_ES;
end
